*Heading
** Job name: Demo_2D_Macro Model name: 2D_Macro
** Generated by: Abaqus/CAE 2017
*Preprint, echo=NO, model=NO, history=NO, contact=NO
**
** PARTS
**
*Part, name=Macro
*Node
      1,         100.,          10.
      2,          90.,          10.
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*Element, type=CPS4
 1,  1,  2, 23, 22
 2,  2,  3, 24, 23
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*Nset, nset=_PickedSet3, internal, generate
  1,  63,   1
*Elset, elset=_PickedSet3, internal, generate
  1,  40,   1
** Section: Solid_Placeholder
*Solid Section, elset=_PickedSet3, material=Epoxy
1.,
*End Part
**
**
** ASSEMBLY
**
*Assembly, name=Assembly
**
*Instance, name=Macro-1, part=Macro
*End Instance
**
*Nset, nset=_PickedSet4, internal, instance=Macro-1, generate
 21,  63,  21
*Elset, elset=_PickedSet4, internal, instance=Macro-1
 20, 40
*Nset, nset=_PickedSet5, internal, instance=Macro-1, generate
  1,  43,  21
*Elset, elset=_PickedSet5, internal, instance=Macro-1
  1, 21
*End Assembly
**
** MATERIALS
**
*Material, name=Epoxy
*Elastic
3500., 0.34
*Plastic
 30.,     0.
 35., 0.0005
 40., 0.0015
 45.,  0.003
 50.,  0.005
 55., 0.0075
 60., 0.0105
 65.,  0.014
 70.,  0.018
 75., 0.0225
 80., 0.0275
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200., 0.2975
** ----------------------------------------------------------------
**
** STEP: Step-1
**
*Step, name=Step-1, nlgeom=NO
*Static
0.1, 1., 1e-05, 0.1
**
** BOUNDARY CONDITIONS
**
** Name: BC-1 Type: Displacement/Rotation
*Boundary
_PickedSet4, 1, 1
_PickedSet4, 2, 2
** Name: BC-2 Type: Displacement/Rotation
*Boundary
_PickedSet5, 2, 2, 30.
**
** OUTPUT REQUESTS
**
*Restart, write, frequency=0
**
** FIELD OUTPUT: F-Output-1
**
*Output, field, variable=PRESELECT
**
** HISTORY OUTPUT: H-Output-1
**
*Output, history, variable=PRESELECT
*End Step
