*Heading
** Job name: Demo_3D_RVE Model name: 3D_RVE
** Generated by: Abaqus/CAE 2017
*Preprint, echo=NO, model=NO, history=NO, contact=NO
**
** PARTS
**
*Part, name=RVE
*Node
      1,         0.25,        -0.25,         0.25
      2,         0.25,       -0.125,         0.25
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*Element, type=C3D8
   1,   46,  354,   31,    1, 1248, 2283, 2259, 1247
   2,  354,  355,   32,   31, 2283, 2284, 2260, 2259
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*Nset, nset=_PickedSet26, internal
    2,    3,    6,    8,   10,   11
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*Elset, elset=_PickedSet26, internal, generate
 2689,  6720,     1
*Nset, nset=_PickedSet27, internal
    1,    2,    3,    4,    5,    6
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*Elset, elset=_PickedSet27, internal, generate
    1,  2688,     1
** Section: Solid_Epoxy
*Solid Section, elset=_PickedSet27, material=Epoxy
,
** Section: Solid_Carbon
*Solid Section, elset=_PickedSet26, material=Carbon
,
*End Part
**
**
** ASSEMBLY
**
*Assembly, name=Assembly
**
*Instance, name=RVE-1, part=RVE
*End Instance
**
*End Assembly
**
** MATERIALS
**
*Material, name=Carbon
*Elastic
200000., 0.2
*Material, name=Epoxy
*Elastic
3500., 0.34
*Plastic
 30.,     0.
 35., 0.0005
 40., 0.0015
 45.,  0.003
 50.,  0.005
 55., 0.0075
 60., 0.0105
 65.,  0.014
 70.,  0.018
 75., 0.0225
 80., 0.0275
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200., 0.2975
